// COMSOL Multiphysics 5.5.0.306 model "2D_Stack.mph"
// Outline of the model tree

Parameters
  SW = 5 [mm]  // Supply Channel Width
  CW = 3[mm]  // Channel Width
  CCW = 150[mm]  // Capacitor Cell Width
  CCH = 93[mm]  // Capacitor Cell Height
  CCL = 15.5 [mm]  // Capacitor Cell Length
  CC = 20  // Cell Count
  CFR = 2[mm]  // Cell Fillet Radius
  MT = 70 [C]  // Max Cell Temperature
  MP = 0.5[bar]  // Max Pump Pressure
  IT = 60[C]  // Inlet Temperature
  KV60 = 5.69 [mm^2/s]  // Diala Kinematic Viscosity at 60C
  HC = 2 [kJ/(kg*K)]  // Diala Heat Capacity
  DD = 805 [kg/m^3]  // Diala Density

Geometry
  geom1 "Geometry 1" (2D, length unit m)
    r1: Rectangle "Base" | size = {2*SW+CCW, CC*(CW+CCL)-CW}
    r2: Rectangle "Cell 1" | pos = {SW, 0}; size = {CCW, CCL}
    fil1: Fillet | point = r2(1) points 1-4; radius = CFR
    arr1: Array | input = fil1; size = CC; type = linear; linearsize = CC; fullsize = {1, 19}; displ = {0, CCL+CW}
    dif1: Difference | input = r1; input2 = arr1
    fin: Finalize "Form Union"

Materials
  mat1: Common "Material 1" on all domains
    def "Basic"
      density = DD
      heatcapacity = HC
      dynamicviscosity = KV60*DD

Physics
  ht: HeatTransferInSolidsAndFluids on all domains
    dependent variable T
    solid1: SolidHeatTransferModel "Solid 1" (default)
    fluid1: FluidHeatTransferModel "Fluid 1" on no domains
    init1: init "Initial Values 1" (default)
    ins1: ThermalInsulation (default)
    temp1: TemperatureBoundary "Temperature 1" on boundaries 2 | T0 = IT
    hf1: HeatFluxBoundary "Heat Flux 1" on boundaries 4-61, 64-83, 85-164
      HeatFluxType = HeatRate
      P0 = 2
      HeatTransferCoefficientType = ExtNaturalConvection
      ExternalFluidType = TransformerOil
  spf: LaminarFlow on all domains
    dependent variable u = {u, v, w}
    fp1: FluidProperties (default)
    init1: init "Initial Values 1" (default)
    wallbc1: WallBC "Wall 1" (default)
    inl1: InletBoundary "Inlet 1" on boundaries 2 | BoundaryCondition = Pressure; p0 = MP
    out1: OutletBoundary "Outlet 1" on boundaries 62

Mesh
  mesh1 "Mesh 1" (physics-controlled)

Studies
  std1 "Study 1"
    stat: Stationary